*Heading
** ----------------------------------------------------------------
**
**
*Node
      1,           0.,           0.
      2, 0.0250000004,           0.
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*Node
9991, 0.0, 0.0
9992, .00001, 0.0
9993, .00001, .00001
9994, 0.0, .00001
** ----------------------------------------------------------------
*User Element,Type=U1,Nodes=8,Coordinates=2,Properties=6,Variables=32,Unsymm
1,2,11
*Element, type=U1
1,    1,    2,   43,   42, 1682, 1683, 1684, 1685
2,    2,    3,   44,   43, 1686, 1687, 1688, 1683
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*Element, type=CPS8R
10001,    1,    2,   43,   42, 1682, 1683, 1684, 1685
10002,    2,    3,   44,   43, 1686, 1687, 1688, 1683
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*Element, type=CPE4T
9999, 9991, 9992, 9993, 9994
** ----------------------------------------------------------------
*Nset, nset=all, generate
1,  4961,     1
*Elset, elset=all, generate
1,  1600,     1
*Nset, nset=botleftpt
1,
*Nset, nset=botrightpt
41,
*Nset, nset=bottom
1,    2,    3,    4,    5,    6
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*Elset, elset=bottom, generate
1,  40,   1
*Nset, nset=left
1,   42,   83,  124,  165,  206
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*Elset, elset=left, generate
1,  1561,    40
*Nset, nset=leftpt
821,
*Nset, nset=right
41,   82,  123,  164,  205,  246
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*Elset, elset=right, generate
40,  1600,    40
*Nset, nset=rightpt
861,
*Nset, nset=top
1641, 1642, 1643, 1644, 1645, 1646
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*Elset, elset=top, generate
1561,  1600,     1
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**
*Elset, elset=dummyall, generate
10001,  11600,    1
*Nset, nset=extraall, generate
9991,  9994,  1
*Elset, elset=extraall
9999
** ----------------------------------------------------------------
*uel property,elset=all
** c0, c1, c2, alpha, beta
1, 1e-2, 5e-5, -0.9, 0.9
**
*Solid Section, elset=dummyall, material=Material-1
*Material, name=Material-1
*Elastic
1e-20,0.
*User output variables
4
**
*Solid Section, elset=extraall, material=Material-2
*Material, name=Material-2
*Elastic
1e-20,0.
*Conductivity
1.0
*Density
1.0
*Specific heat
1.0
** ----------------------------------------------------------------
*Initial Conditions, type=TEMPERATURE
all, 0.
*Initial Conditions, type=TEMPERATURE
extraall, 0.
** ----------------------------------------------------------------
**
** STEP: Step-1
**
*Step, name=Step-1, nlgeom=YES
*Coupled Temperature-displacement, creep=none, steady state
0.01, 1., 1e-05, 1.
**
** BOUNDARY CONDITIONS
**
** Name: BC-1 Type: Displacement/Rotation
*Boundary
leftpt, 1, 1
leftpt, 2, 2
** Name: BC-2 Type: Displacement/Rotation
*Boundary
rightpt, 1, 1, 0.36
**
** ----------------------------------------------------------------
**
*Output, field
*node output, nset=all
u
*Node output, nset=extraall
u
*Element output, elset=dummyall
le,uvarm
**

*End Step
